import Sofa

import topo
from tools import *


def createScene(rootNode):

                rootNode.createObject('RequiredPlugin', pluginName='SoftRobots')
                rootNode.createObject('VisualStyle', displayFlags='showVisualModels showBehaviorModels showCollisionModels hideBoundingCollisionModels showForceFields showInteractionForceFields hideWireframe')

                rootNode.findData("gravity").value = "0 -9810 0"

                rootNode.createObject('BackgroundSetting', color='0 0.168627 0.211765')
                rootNode.createObject('OglSceneFrame', style="Arrows", alignment="TopRight")


                ##########################################
                # FEM Model
                ##########################################
                sizeX, sizeY, sizeZ = 120, 65, 5
                x , y , z = 26, 14, 2

                object = rootNode.createChild('object')
                object.createObject('EulerImplicit', name='odesolver', firstOrder='0')
                object.createObject('CGLinearSolver')
                grid = object.createObject('RegularGridTopology', name= 'grid', n="{0} {1} {2}".format(x, y, z), max="{0} {1} {2}".format(sizeX, sizeY, sizeZ), min="0 0 0")
                hexa = grid.findData('hexahedra').value

                object.createObject('MechanicalObject', name='tetras', template='Vec3d', showIndices='false', showIndicesScale='4e-5', rx='0', dz='0')
                object.createObject('UniformMass', totalmass='0.02')
                object.createObject('PartialFixedConstraint', fixedDirections='0 0 1', fixAll="true")

                object.createObject('BoxROI', name='ROI1', box='0 15 0 5 20 5', drawBoxes='true')
                object.createObject('FixedConstraint', indices='@ROI1.indices')

                object.createObject('BoxROI', name='ROI2', box='0 30 0 5 35 5', drawBoxes='true')
                object.createObject('FixedConstraint', indices='@ROI2.indices')

                object.createObject('BoxROI', name='ROI3', box='0 45 0 5 50 5', drawBoxes='true')
                object.createObject('FixedConstraint', indices='@ROI3.indices')

                object.createObject('BoxROI', name='ROIForce', box='115 30 0 120 35 5', drawBoxes='true')
                object.createObject('ConstantForceField', force='0 -100 0', points='@ROIForce.indices')


                ##########################################
                # Subtopology for Force Field
                ##########################################
                mask = matrixImageToMask(topo.topology, x-1, y-1)
                hexaStr = tabToString(hexa, mask)

                subTopo = object.createChild('subTopo')
                subTopo.createObject('HexahedronSetTopologyContainer', position='@../grid.position', hexahedra=hexaStr)
                subTopo.createObject('HexahedronFEMForceField', template='Vec3d', name='FEM', method='large', poissonRatio='0.3',  youngModulus='5000')


                ##########################################
                # Controller
                ##########################################
                object.createObject('PythonScriptController', filename="controller.py", classname="controller")

                return rootNode
